units real
atom_style full
atom_modify map array
neighbor 2.0 bin

region mybox block 0 145 0 145 0 145 units box
create_box 10 mybox bond/types 5 angle/types 2 extra/bond/per/atom 15 extra/angle/per/atom 10 extra/special/per/atom 10

group RSi type 1 2 3
group SI type 1
group other subtract all RSi
neigh_modify every 1 delay 0 check yes exclude molecule/intra RSi
molecule        rsimol RSi.mol
molecule        tpamol TPA.mol
molecule        namol Na.mol
molecule        brmol Br.mol
molecule        wmol  W.mol

variable seed index ${seed}
create_atoms    0 random 2480 ${seed} mybox mol rsimol 9567 units box overlap 1.2
create_atoms    0 random 248 ${seed} mybox mol tpamol 9567 units box overlap 1.2
create_atoms    0 random 248 ${seed} mybox mol namol 9567 units box overlap 2.5
create_atoms    0 random 496 ${seed} mybox mol brmol 9567 units box overlap 2.5
create_atoms    0 random 49600 ${seed} mybox mol wmol 9567 units box overlap 2.0

# VSiIA
mass 1 28.0000	# SN1dq:Si
mass 2  9.0000  # DO:   DO[1-4]
mass 3  1.0000  # V:	V[X|Y][1-2]

# TPA
mass 4 29.061   # TC3q:	C[1-4]
mass 5 70.114   # N2q:	N1

# NA+ BR WT
mass 6 36.0000  # TQ5:	NA+
mass 7 79.9000  # SQ4:	BR
mass 8 36.0000  # TW:	W

pair_style hybrid/overlay full lj/gromacs/coul/gromacs 9.0 12.0  lennard/mdf 9.0 12.0  coul/long 12.0 yukawa 1.80 12.0 # gauss/cut 12.0

pair_coeff  1 1     lj/gromacs/coul/gromacs 2.6124  2.717
pair_coeff	1	2	    lj/gromacs/coul/gromacs	0.0000	0.000
pair_coeff	1	3	    lj/gromacs/coul/gromacs	0.0000	0.000
pair_coeff  1 4     lj/gromacs/coul/gromacs 0.1798 3.0535
pair_coeff  1 5     lj/gromacs/coul/gromacs 0.6744 3.4784
pair_coeff  1 6     lj/gromacs/coul/gromacs 0.3745 4.3221
pair_coeff	1	7	    lj/gromacs/coul/gromacs	1.4871	4.100
pair_coeff	1	8	    lj/gromacs/coul/gromacs	0.5139	2.780

pair_coeff  2 2     lj/gromacs/coul/gromacs 27.332 0.9122
pair_coeff	2	3	    coul/long
pair_coeff	2	3	    lennard/mdf		          11273.4	0.000
pair_coeff  2 4     lj/gromacs/coul/gromacs 0.4749 3.5332
pair_coeff  2 5     lj/gromacs/coul/gromacs 0.0285 3.7966
pair_coeff  2 6     lj/gromacs/coul/gromacs 3.2822 2.2863
pair_coeff	2	7 	  lj/gromacs/coul/gromacs	0.0000	0.000
pair_coeff	2	8	    lj/gromacs/coul/gromacs	0.0000	0.000

pair_coeff	3	3	    lj/gromacs/coul/gromacs	0.0000	0.000
pair_coeff	3	4	    lj/gromacs/coul/gromacs	0.0000	0.000
pair_coeff	3	5	    lj/gromacs/coul/gromacs	0.0000	0.000
pair_coeff	3	6	    lj/gromacs/coul/gromacs	0.0000	0.000
pair_coeff	3	7	    lj/gromacs/coul/gromacs	0.0000	0.000
pair_coeff	3	8	    lj/gromacs/coul/gromacs	0.0000	0.000

pair_coeff	4	4	    lj/gromacs/coul/gromacs	0.4230	2.400
pair_coeff	4	5	    lj/gromacs/coul/gromacs	0.5975	2.950
pair_coeff	4	6	    lj/gromacs/coul/gromacs	0.5609	2.850
pair_coeff	4	7	    lj/gromacs/coul/gromacs	0.5839	2.780
pair_coeff	4	8	    lj/gromacs/coul/gromacs	0.3513	2.510

pair_coeff	5	5	    lj/gromacs/coul/gromacs	0.9704	4.700
pair_coeff	5	6	    lj/gromacs/coul/gromacs	2.1432	2.950
pair_coeff	5	7	    lj/gromacs/coul/gromacs	1.5186	4.300
pair_coeff	5	8	    lj/gromacs/coul/gromacs	0.6381	2.950

pair_coeff	6	6	    lj/gromacs/coul/gromacs	0.2629	2.570
pair_coeff	6	7	    lj/gromacs/coul/gromacs	0.8126	2.730
pair_coeff	6	8	    lj/gromacs/coul/gromacs	2.1625	2.450

pair_coeff	7	7	    lj/gromacs/coul/gromacs	0.8819	4.100
pair_coeff	7	8	    lj/gromacs/coul/gromacs	1.4108	2.780

pair_coeff	8	8	    lj/gromacs/coul/gromacs	0.6692	2.500

kspace_style pppm/cg 1.0e-4 1.0e-5
dielectric 	15.0
special_bonds   lj  0.0   1.0   1.0

bond_style	harmonic
angle_style 	harmonic
# RSi
bond_coeff      1       1500 1.03171
bond_coeff      2       1500 2.32650
bond_coeff      3       1500 1.69000

# RSi
angle_coeff     1       3585 0.0

# TPA
bond_coeff      4       12500 3.2446

# TPA
angle_coeff     2       4.9474 109.47

# Temporary Bond For AB-AB
bond_coeff      5       41.5410511 1.023932

# keep RSi rigid
variable        tfac equal 5.0/3.0 # (3 trans + 2 rot)/(3 trans)
fix		rigid RSi rigid/nvt/small molecule temp 453.0 453.0 25.0
fix_modify      rigid dynamic/dof yes

fix	    	mynvt other nvt temp 453.0 453.0 25.0 dilate all
fix_modify 	mynvt dynamic/dof yes
fix 		move all momentum 1 linear 1 1 1

thermo_style custom step temp press ke pe epair etotal
timestep  0.10
thermo    100

run	100
write_data	lmp.data nocoeff
