units real
atom_style full
atom_modify map yes
neighbor 2.0 bin

read_data	lmp.data extra/bond/per/atom 5 extra/special/per/atom 15

# RSi
mass 1 28.0000	# SN1dq:Si
mass 2  9.0000  # DO:   DO[1-4]
mass 3  1.0000  # V:	V[X|Y][1-2]

# TPA
mass 4 29.061   # TC3q:	C[1-4]
mass 5 70.114   # N2q:	N1

# NA+ BR WT
mass 6 36.0000  # TQ5:	NA+
mass 7 79.9000  # SQ4:	BR
mass 8 36.0000  # TW:	W

pair_style hybrid/overlay full lj/gromacs/coul/gromacs 9.0 12.0  lennard/mdf 9.0 12.0  coul/long 12.0 yukawa 1.80 12.0 # gauss/cut 12.0

pair_coeff  1 1     lj/gromacs/coul/gromacs 2.6124  2.717
pair_coeff	1	2	    lj/gromacs/coul/gromacs	0.0000	0.000
pair_coeff	1	3	    lj/gromacs/coul/gromacs	0.0000	0.000
pair_coeff  1 4     lj/gromacs/coul/gromacs 0.1798 3.0535
pair_coeff  1 5     lj/gromacs/coul/gromacs 0.6744 3.4784
pair_coeff  1 6     lj/gromacs/coul/gromacs 0.3745 4.3221
pair_coeff	1	7	    lj/gromacs/coul/gromacs	1.4871	4.100
pair_coeff	1	8	    lj/gromacs/coul/gromacs	0.5139	2.780

pair_coeff  2 2     lj/gromacs/coul/gromacs 27.332 0.9122
pair_coeff	2	3	    coul/long
pair_coeff	2	3	    lennard/mdf		          11273.4	0.000
pair_coeff  2 4     lj/gromacs/coul/gromacs 0.4749 3.5332
pair_coeff  2 5     lj/gromacs/coul/gromacs 0.0285 3.7966
pair_coeff  2 6     lj/gromacs/coul/gromacs 3.2822 2.2863
pair_coeff	2	7 	  lj/gromacs/coul/gromacs	0.0000	0.000
pair_coeff	2	8	    lj/gromacs/coul/gromacs	0.0000	0.000

pair_coeff	3	3	    lj/gromacs/coul/gromacs	0.0000	0.000
pair_coeff	3	4	    lj/gromacs/coul/gromacs	0.0000	0.000
pair_coeff	3	5	    lj/gromacs/coul/gromacs	0.0000	0.000
pair_coeff	3	6	    lj/gromacs/coul/gromacs	0.0000	0.000
pair_coeff	3	7	    lj/gromacs/coul/gromacs	0.0000	0.000
pair_coeff	3	8	    lj/gromacs/coul/gromacs	0.0000	0.000

pair_coeff	4	4	    lj/gromacs/coul/gromacs	0.4230	2.400
pair_coeff	4	5	    lj/gromacs/coul/gromacs	0.5975	2.950
pair_coeff	4	6	    lj/gromacs/coul/gromacs	0.5609	2.850
pair_coeff	4	7	    lj/gromacs/coul/gromacs	0.5839	2.780
pair_coeff	4	8	    lj/gromacs/coul/gromacs	0.3513	2.510

pair_coeff	5	5	    lj/gromacs/coul/gromacs	0.9704	4.700
pair_coeff	5	6	    lj/gromacs/coul/gromacs	2.1432	2.950
pair_coeff	5	7	    lj/gromacs/coul/gromacs	1.5186	4.300
pair_coeff	5	8	    lj/gromacs/coul/gromacs	0.6381	2.950

pair_coeff	6	6	    lj/gromacs/coul/gromacs	0.2629	2.570
pair_coeff	6	7	    lj/gromacs/coul/gromacs	0.8126	2.730
pair_coeff	6	8	    lj/gromacs/coul/gromacs	2.1625	2.450

pair_coeff	7	7	    lj/gromacs/coul/gromacs	0.8819	4.100
pair_coeff	7	8	    lj/gromacs/coul/gromacs	1.4108	2.780

pair_coeff	8	8	    lj/gromacs/coul/gromacs	0.6692	2.500

kspace_style pppm/cg 1.0e-4 1.0e-5
dielectric 	15.0
special_bonds   lj  0.0   1.0   1.0

bond_style	harmonic
angle_style 	harmonic
# RSi
bond_coeff      1       1500 1.03171
bond_coeff      2       1500 2.32650
bond_coeff      3       1500 1.69000

# RSi
angle_coeff     1       3585 0.0

# TPA
bond_coeff      4       12500 3.2446

# TPA
angle_coeff     2       4.9474 109.47

group RSi type 1 2 3
group TPA type 4 5
group SI type 1
group other subtract all RSi
neigh_modify every 1 delay 0 check yes exclude molecule/intra RSi one 10000

compute T_VSi RSi temp
compute T_other other temp
fix     rigid RSi rigid/nvt/small molecule temp ${T} ${T} 25.0
fix_modify      rigid dynamic/dof yes temp T_VSi
fix   mynvt_other other nvt temp ${T} ${T} 100.0
fix_modify mynvt_other temp T_other
fix   move all momentum 1 linear 1 1 1

thermo_style custom step temp press ke pe epair etotal
timestep  ${TIME_STEP}
thermo    1000

# Fixed SI and Relaxation
fix  freeze SI spring/self 200.0 xyz
minimize 1e-3 1e-4 1000 1000
unfix freeze

run ${NVT_STEPS}

unfix mynvt_other
fix   mynpt_other other npt temp ${T} ${T} 100.0 iso ${P} ${P} 500.0
fix_modify mynpt_other temp T_other
run ${NPT_STEPS}
unfix mynpt_other
fix   mynvt_other other nvt temp ${T} ${T} 100.0
fix_modify mynvt_other temp T_other

dump        	kMC all custom 1 lmp_${current_time}.lammpstrj id mol type q xu yu zu
dump_modify 	kMC sort id delay 1 pbc yes
run 0
undump        kMC

write_data  lmp.data nocoeff
